@Behaviour Mazars;
@Author F.Hamon / jmp / th;
@Date 25 06 2013;
@Description {
  "Modèle d'endommagement de Mazars"
}

@Parameter stress young = 3.2e10;
young.setGlossaryName("YoungModulus");
@Parameter real nu = 0.2;
nu.setGlossaryName("PoissonRatio");

@Parameter real Ac = 1.15;
@Parameter real At = 0.8;
@Parameter real Bc = 1391.3;
@Parameter real Bt = 10000;
@Parameter real k = 0.7;
@Parameter real ed0 = 9.375e-5;

@StateVariable real d;
d.setGlossaryName("Damage");
@StateVariable real Y;
@StateVariable real eeqcor;

@LocalVariable stress lambda;
@LocalVariable stress mu;

@InitLocalVariables {
  lambda = computeLambda(young, nu);
  mu = computeMu(young, nu);
}

@ProvidesTangentOperator;
@Integrator {
  const Stensor e = eto + deto;
  const real tr = trace(e);
  const Stensor s0 = lambda * tr * Stensor::Id() + 2 * mu * e;
  const real dmax = 0.99999;
  strain e1, e2, e3;
  e.template computeEigenValues<Stensor::FSESJACOBIEIGENSOLVER>(e1, e2, e3);
  // eigen values of s0
  const stress s1 = 2 * mu * e1 + lambda * tr;
  const stress s2 = 2 * mu * e2 + lambda * tr;
  const stress s3 = 2 * mu * e3 + lambda * tr;
  const real sn = max(abs(s1), max(abs(s2), abs(s3)));
  const real ppe1 = max(strain(0), e1);
  const real ppe2 = max(strain(0), e2);
  const real ppe3 = max(strain(0), e3);
  const stress pps1 = max(stress(0), s1);
  const stress pps2 = max(stress(0), s2);
  const stress pps3 = max(stress(0), s3);
  real r = 1.;
  if (sn > 1.e-6 * young) {
    r = (pps1 + pps2 + pps3) / (abs(s1) + abs(s2) + abs(s3));
  }
  real gam = 1.;
  if ((min(s1, min(s2, s3)) < 0.) &&
      (tfel::math::ieee754::fpclassify(r) == FP_ZERO)) {
    const stress pns1 = min(stress(0), s1);
    const stress pns2 = min(stress(0), s2);
    const stress pns3 = min(stress(0), s3);
    gam = -sqrt(pns1 * pns1 + pns2 * pns2 + pns3 * pns3) / (pns1 + pns2 + pns3);
  }
  const real eeqc = sqrt(ppe1 * ppe1 + ppe2 * ppe2 + ppe3 * ppe3);
  eeqcor = max(gam * eeqc, eeqcor);
  const real A = At * (2 * r * r * (1. - 2 * k) - r * (1 - 4 * k)) +
                 Ac * (2 * r * r - 3 * r + 1);
  const real B = r * r * Bt + (1 - r * r) * Bc;
  const real Y1 = max(ed0, eeqcor);
  Y = max(Y1, Y);
  d = max(d, 1 - (1 - A) * ed0 / Y - A * exp(-B * (Y - ed0)));
  d = min(dmax, d);
  sig = (1. - d) * s0;
  if (computeTangentOperator_) {
    if (smt == ELASTIC) {
      computeAlteredElasticStiffness<hypothesis, Type>::exe(Dt, lambda, mu);
    } else if (smt == SECANTOPERATOR) {
      StiffnessTensor Hooke;
      computeAlteredElasticStiffness<hypothesis, Type>::exe(Hooke, lambda, mu);
      Dt = (1 - d) * Hooke;
    } else {
      StiffnessTensor Hooke;
      Stensor eplus;
      const real RTEMP = B * (Y - ed0);
      real COEF = 0.;
      computeAlteredElasticStiffness<hypothesis, Type>::exe(Hooke, lambda, mu);
      if ((d < dmax) && (dd > 0.) && (Y > 1.e-6)) {
        COEF = ed0 * (1. - A) / (Y * Y);
        if (RTEMP < 200.0) {
          COEF = COEF + A * B / exp(RTEMP);
        }
        COEF = gam * gam * COEF / Y;
      }
      for (unsigned short i = 0; i != e.size(); ++i) {
        eplus[i] = max(real(0), e[i]);
      }
      Dt = (1. - d) * Hooke - COEF * (s0 ^ eplus);
    }
  }
}
