@DSL Implicit;
@Behaviour LogarithmicStrainStandardElasticity;
@Author Thomas Helfer;
@Date   8/03/2018;
@Description{
  "This tests aims at:"
  "- testing the axisymmetrical generalised plane stress"
  "  modelling hypothesis used in the `Cyrano` fuel "
  "  performance code"
  "- testing the `computeElasticPrediction` method"
}

@ModellingHypotheses {".+"};
@StrainMeasure Hencky;

@Epsilon 1.e-16;

@Brick StandardElasticity{
  young_modulus: 150e9,  //
  poisson_ratio : 0.3
};

@AuxiliaryStateVariable StressStensor sigel;

@LocalVariable StressStensor sig0;

@InitLocalVariables{
  sig0 = sig;
  sigel = computeElasticPrediction();
}

@UpdateAuxiliaryStateVariables {
  const auto ds = eval(theta * sig + (1 - theta) * sig0 - sigel);
  if (sqrt(ds | ds) > 10 * epsilon * young) {
    return tfel::fail("invalid stress prediction");
  }
}
