@DSL Implicit;
@Behaviour OrthotropicStandardElastoViscoPlasticityTest;
@Description {
  "A behaviour testing the StandardElastoViscoPlasticity brick: Norton "
  "viscoplastic flow, Hill criterion, Voce and linear isotropic hardening "
  "rules."
}
@ModellingHypotheses {".+"};
@Epsilon 1.e-14;
@Theta 1;
@OrthotropicBehaviour<Pipe>;

@Brick StandardElastoViscoPlasticity{
  stress_potential : "Hooke" {young_modulus : 150e9, poisson_ratio : 0.3},
  inelastic_flow : "Norton" {
    criterion : "Hill" {F : 0.371, G : 0.629, H : 4.052, L : 1.5, M : 1.5, N : 1.5},
    isotropic_hardening : "Voce" {R0 : 100e6, Rinf : 150e6, b : 20},
    isotropic_hardening : "Linear" {H : 1e9},
    K : 250e6,
    n : 3.2
  }
};
